**
**   Structure: beam under compression.
**   Test objective: C3D15 wedge element.
**
*Heading
try pressure on tri faces of wedge
**
*Node, Nset=Allnodes
      10,          0.,          0.,          0.
      11,         0.5,          0.,          0.
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*Element, type=C3D15, elset=P3
     17,     10,     18,     17,     44,     52,     51,     21,     34,
             20,     55,     68,     54,     35,     43,     42
     18,     10,     11,     18,     44,     45,     52,     19,     23,
             21,     53,     57,     55,     35,     36,     43
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*ELSET, ELSET=OUT_CONT, GENERATE
17,40,1
*ORIENTATION, NAME=S0, DEFINITION=COORDINATES, SYSTEM=RECTANGULAR
        1.,        0.,        0.,        0.,        1.,        0.
*MATERIAL, NAME=M1
*ELASTIC, TYPE=ISOTROPIC
 29000000.,      0.32,       70.
*EXPANSION, TYPE=ISO
    6.6E-6,       70.
*DENSITY
0.00073315
*SOLID SECTION, ELSET=P3, MATERIAL=M1, ORIENTATION=S0
*STEP, INC=100
*STATIC
*NODE PRINT,NSET=GLOBAL
   U,RF
*EL PRINT, ELSET=OUT_CONT,GLOBAL=YES
    S
*BOUNDARY, OP=NEW
   10,    1,3
   12,    2,3
   16,    3
*DLOAD, OP=NEW
   33,P2   ,       20.
   34,P2   ,       20.
   35,P2   ,       20.
   36,P2   ,       20.
   37,P2   ,       20.
   38,P2   ,       20.
   39,P2   ,       20.
   40,P2   ,       20.
   17,P1   ,       20.
   18,P1   ,       20.
   19,P1   ,       20.
   20,P1   ,       20.
   21,P1   ,       20.
   22,P1   ,       20.
   23,P1   ,       20.
   24,P1   ,       20.
*END STEP
