*HEADING
ADAPTIVE MESHING EXAMPLE
SPHERICAL INDENTATION (GRADED MESH)
Units - N, mm
*RESTART,W,N=1
*NODE
      1,         300.,         300.,         300.
      2,         300.,           0.,         300.
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*ELEMENT, TYPE=C3D8R,ELSET=BLANK
   1,    1,   19,  556,   74,  150, 1620, 5496,  898
   2,   19,   20,  557,  556, 1620, 1621, 5497, 5496
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*ELEMENT, TYPE=C3D8R,ELSET=BLANK
4001,   300,  2855,  8745,  2133,     1,    19,   556,    74
4002,  2855,  2856,  8746,  8745,    19,    20,   557,   556
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*ELEMENT, TYPE=C3D8R,ELSET=BLANK
 8001,   150,  1620, 11994,  3539,     1,    19,  3197,   385
 8002,  1620,  1621, 11995, 11994,    19,    20,  3198,  3197
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*ELEMENT, TYPE=C3D8R,ELSET=BLANK
12001,     1,    19,  3197,   385,   300,  2855, 15243,  4603
12002,    19,    20,  3198,  3197,  2855,  2856, 15244, 15243
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*NSET, NSET=NSET1
    1,    4,    5,    8,   11,   12
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*NSET, NSET=NSET3
    2,    3,    6,    7,    9,   10
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*ELSET, ELSET=ASSEMBLY_G_GSET-2, GENERATE
    10,  16000,     10
*NODE,NSET=NOUT
100000,300.,410.,300.
*ELEMENT,TYPE=MASS,ELSET=PMASS
100000,100000
*MASS,ELSET=PMASS
0.2,
*SOLID SECTION,ELSET=BLANK,MATERIAL=FOAM, CONTROLS=SECT
*SECTION CONTROLS,HOURGLASS=ENHANCED, KINEMATICS=ORTHOGONAL,NAME=SECT
*MATERIAL,NAME=FOAM
*ELASTIC
 7.5E3, 0.0
*CRUSHABLE FOAM,HARDENING=ISOTROPIC
 1.0, 0.0
*CRUSHABLE FOAM HARDENING
 0.2000E3, 0.0000
 0.2577E3, 0.0094
 0.2760E3, 0.0258
 0.3053E3, 0.0452
 0.3267E3, 0.0655
 0.3623E3, 0.1084
 0.3891E3, 0.1540
 0.4250E3, 0.2405
 0.4568E3, 0.3812
 0.4738E3, 0.4600
 0.5170E3, 0.6391
 0.5862E3, 0.8570
 0.6503E3, 0.9857
 0.7470E3, 1.1324
 0.9820E3, 1.2965
 1.4702E3, 1.4808
 2.7262E3, 1.6609
 5.3911E3, 1.9000
*DENSITY
 60.E-9,
*BOUNDARY
NSET3,1,3,
100000,1,
100000,3,
100000,4,6,
*AMPLITUDE,NAME=RAMPP,TIME=TOTAL TIME, DEFINITION=SMOOTH STEP
0.0,0.0,0.06,-250.,
**
** STEP: STEP-1
**
*SURFACE,TYPE=ELEMENT, NAME=TARGET
_G7_S6, S6
*SURFACE,TYPE=REVOLUTION,NAME=PUNCH
300., 400., 300.,300.,600., 300.
START,100.,80.
LINE, 100.,0.
CIRCL,0.,-100.,0.,0.
*RIGID BODY,REF NODE=100000, ANALYTICAL SURFACE =PUNCH
*STEP
*DYNAMIC, EXPLICIT
, 0.06
*BOUNDARY,AMPLITUDE=RAMPP
100000,2,2,1.
*ELSET, ELSET=_G7_S6
12001,12011,12021,12031,12041,12051
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*SURFACE INTERACTION,NAME=IMP_TARG
*CONTACT PAIR,INTERACTION=IMP_TARG
PUNCH,TARGET
*ADAPTIVE MESH, ELSET=BLANK,CONTROLS=GRADED,MESH SWEEPS=3
*ADAPTIVE MESH CONTROLS, NAME=GRADED, SMOOTHING=GRADED
*FILE OUTPUT,NUMBER INTERVAL=1, TIMEMARKS=YES
*EL FILE, ELSET=QA_TEST
 PEEQ,
*NODE FILE, NSET=QA_TEST
 U,
*ENERGY FILE
*****
*NSET, NSET=QA_TEST_REFN
NOUT,
*ELSET, ELSET=QA_TEST, GEN
1, 15001, 1000
*NSET, NSET=QA_TEST
NSET1,
*OUTPUT, FIELD, TIME MARKS=YES, NUMBER INTERVAL=1
*ELEMENT OUTPUT, ELSET=QA_TEST
PEEQ,
*NODE OUTPUT, NSET=QA_TEST
U,
*NODE OUTPUT, NSET=QA_TEST_REFN
RF,
*OUTPUT, HIST, FREQ=9999
*ENERGY OUTPUT, VAR=PRESELECT
*** output for figures
*OUTPUT, FIELD, TIME MARKS=YES, NUMBER INTERVAL=1
*ELEMENT OUTPUT
PEEQ,
*NODE OUTPUT
U,
*END STEP
