*HEADING
 GLOBAL MODEL FOR SUBMODELING EXAMPLE
 STACKEDASSEMBLY_S4R_GLOBAL
 MULTIPLE *SUBMODEL OPTIONS
*NODE,NSET=ALLNO
11426,2729.31116,-551.83477,678.18316
11427,2729.31116,-551.83477,663.82935
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*ELEMENT,TYPE=S4R
6104,12874,12078,12843,12864
6126,13348,12829,11443,12835
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*ELEMENT,TYPE=S3R
6101,12797,12810,12811
6103,12797,12811,12815
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*ELSET,ELSET=LAYER1
6101,6103,6104,6105,6106,6107
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*ELSET,ELSET=LAYER2
207656,207706,207710,207712,207714,207719
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*ELSET,ELSET=LAYER3
213547,213548,213551,213552,213553,213554
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*ELSET,ELSET=LAYER4
213015,213016,213017,213018,213044,213045
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*ELSET,ELSET=LAYER5
214533,214534,214535,214536,214537,214538
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*NSET,NSET=BC1,GENERATE
11461,11465
12265,12268
12255,12255
*NSET,NSET=BC2
135970,135982,131457,131494,131480,131425,136009,136023,135992,127991,128010,128001
*NSET,NSET=BC3
127825,131657,131661,131671,131674,131708
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*NSET,NSET=CNODE1
11437,11438,11439,11440,11441,11442
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*NSET,NSET=CNODE3
127953,127954,127955,127957,127967,127968
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*NSET,NSET=CNODE4A
127853,131390,132748,132749,132750,132804
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*NSET,NSET=CNODE4B
131521,132894,132896,132908,132909,132910,133959,133960,134072,134073
*NSET,NSET=CNODE5
136825,136826,136841,136845,136850,136853
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*ELSET,ELSET=LA2SNEG
207656,207706,207710,207714,207719,207723
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*ELSET,ELSET=LA2SPOS
207712,207720,207721,207722,207815,207822
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*ELSET,ELSET=TLAYER4
213015,213016,213017,213018,213044,213045
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*MPC
BEAM,137004,132830
BEAM,137008,132827
BEAM,137016,132826
BEAM,136999,132817
BEAM,137000,132806
BEAM,136991,132807
BEAM,136990,132809
BEAM,136886,132831
BEAM,132809,127952
BEAM,132807,127950
BEAM,132806,127949
BEAM,132817,127956
BEAM,132826,127961
BEAM,132827,127962
BEAM,132830,127965
BEAM,132831,127966
BEAM,127961,127151
BEAM,127956,127119
BEAM,127949,127781
BEAM,127950,127791
BEAM,127952,127791
BEAM,127966,127748
BEAM,127965,127722
BEAM,127962,127685
BEAM,127685,12799
BEAM,127722,12855
BEAM,127748,12854
BEAM,127791,12851
BEAM,127787,12846
BEAM,127781,12796
BEAM,127119,12849
BEAM,127151,12800
BEAM,12800,12874
BEAM,12849,12864
BEAM,12796,12830
BEAM,12846,12861
BEAM,12851,12866
BEAM,12854,12869
BEAM,12855,12870
BEAM,12799,12873
*INCLUDE,INPUT=stackedassembly_s4r_global_mesh.inp
*SHELLSECTION,ELSET=LAYER1,MATERIAL=STEEL
0.5,
*SHELLSECTION,ELSET=LAYER2,MATERIAL=STEEL
0.5,
*SHELLSECTION,ELSET=LAYER3,MATERIAL=STEEL
0.5,
*SHELLSECTION,ELSET=LAYER4,MATERIAL=STEEL
0.5,
*SHELLSECTION,ELSET=LAYER5,MATERIAL=STEEL
0.5,
*MATERIAL,NAME=STEEL
*DENSITY
7.8E-09,
*ELASTIC
207000.,0.28
*PLASTIC
250.0,0.0
420.0,0.2
*SURFACE, NAME=BLAYER2
LA2SPOS,SPOS
LA2SNEG,SNEG
*SURFACE, NAME=TLAYER2
LA2SPOS,SNEG
LA2SNEG,SPOS
*SURFACE, NAME=TLAYER3
LAYER3,SNEG
*SURFACE, NAME=TLAYER4
TLAYER4,SPOS
*SURFACE, TYPE=NODE, NAME=CNODE1
CNODE1,
*SURFACE, TYPE=NODE, NAME=CNODE3
CNODE3,
*SURFACE, TYPE=NODE, NAME=CNODE4A
CNODE4A,
*SURFACE, TYPE=NODE, NAME=CNODE4B
CNODE4B,
*SURFACE, TYPE=NODE, NAME=CNODE5
CNODE5,
*SURFACE INTERACTION,NAME=INTER1
*CONTACT PAIR,INTERACTION=INTER1,SMALL SLIDING,NOTHICK
CNODE1,BLAYER2
CNODE3,TLAYER2
CNODE4A,TLAYER3
CNODE4B,TLAYER2
CNODE5,TLAYER4
*BOUNDARY
BC1,1,6
BC3,1,6
*RESTART,WRITE,OVERLAY
*STEP,INC=999,NLGEOM
*STATIC
0.025,1.0
*BOUNDARY
BC2,3,3,-12.5
BC2,1,1,-5.0
*ELPRINT,FREQ=0
*NODEPRINT,FREQ=0
*NODEFILE,NSET=ALLNO,FREQ=100
U,
*OUTPUT,FIELD,FREQ=100
*ELEMENT OUTPUT
E,
*NODE OUTPUT, NSET=ALLNO
U,
*CONTACT OUTPUT
CSTRESS,CDISP
*END STEP
